// COMSOL Multiphysics 6.0.0.318 model "Beam_Calculation.mph"
// Outline of the model tree

Geometry
  geom1 "Geometry 1" (2D, length unit mm)
    r1: Rectangle | size = {300, 28}
    fin: Finalize "Form Union"

Materials
  mat1: Common "Structural steel" on all domains
    def "Basic"
      relpermeability = 1
      heatcapacity = 475[J/(kg*K)]
      thermalconductivity = 44.5[W/(m*K)]
      electricconductivity = 4.032e6[S/m]
      relpermittivity = 1
      thermalexpansioncoefficient = 12.3e-6[1/K]
      density = 7850[kg/m^3]
    Enu "Young's modulus and Poisson's ratio"
      E = 200e9[Pa]
      nu = 0.30
    Murnaghan
      l = -3.0e11[Pa]
      m = -6.2e11[Pa]
      n = -7.2e11[Pa]
    Lame "Lamé parameters"
      lambLame = 1.15e11[Pa]
      muLame = 7.69e10[Pa]

Physics
  solid: SolidMechanics on all domains
    dependent variable u = {u, v, w}
    lemm1: LinearElasticModel "Linear Elastic Material 1" (default)
    free1: Free (default)
    init1: init "Initial Values 1" (default)
    fix1: Fixed "Fixed Constraint 1" on boundaries 4
    bndl1: BoundaryLoad on boundaries 3 | FperArea = {0, -20000, 0}

Mesh
  mesh1 "Mesh 1"
    size: MeshSizeDefault | hmin = 0.03; hauto = 3; custom = on
    map1: Map "Mapped 1" on entire geometry
      dis1: Distribution on boundaries 2 | numelem = 50
      dis2: Distribution on boundaries 1 | numelem = 4

Studies
  std1 "Study 1"
    stat: Stationary

Solver configurations
  sol1 "Solution 1" (study std1)
    v1: Variables "Dependent Variables 1"
    s1: Stationary "Stationary Solver 1"
      dDef: Direct
      fc1: FullyCoupled | linsolver = dDef

Datasets
  dset1: Solution | solution = sol1

Derived values
  gev1: EvalGlobal "Global Evaluation 1"
    data = dset1
    table = tbl1
    expr = {solid.RFtotalx, solid.RFtotaly, }
    unit = {N, N, }
    descr = {"Total reaction force, x component", "Total reaction force, y component", }
    dataseries = maximum
    maximumobj = abs
    minimumobj = abs

Tables
  tbl1: Table
    // Global Evaluation 1
    Maximum: Total reaction force, x component (N) | Maximum: Total reaction force, y component (N)
    1.36229e-08 | 60

Plots
  pg1: PlotGroup2D "Stress (solid)" | data = dset1
    surf2: Surface | expr = solid.sy; descr = Stress tensor, y component
      def1: Deform "Deformation 1" | expr = {u, v}
    con1: Contour | expr = solid.sy; descr = Stress tensor, y component; contourlabels = on; radiusexpr = 0.01
      col1: Color "Color Expression 1" | expr = solid.sx
      def1: Deform "Deformation 1" | expr = {u, v}
  pg2: PlotGroup2D "Boundary Loads (solid)" | data = dset1
    arwl1: ArrowLine "Boundary Load 1" | expr = {solid.bndl1.F_Ax, solid.bndl1.F_Ay}
      col: Color "Color Expression" | expr = solid.bndl1.F_A_Mag
      def: Deform "Deformation" | expr = {u, v}; descr = Displacement field
    surf1: Surface "Gray Surfaces" | expr = 1
      def: Deform "Deformation" | expr = {u, v}; descr = Displacement field
      sel1: Selection on domains 1
  pg3: PlotGroup2D "2D Plot Group 3" | data = dset1
    surf1: Surface | expr = u; descr = Displacement field, X component

Exports
  img2: Image | size = manualweb; unit = px; width = 640; height = 480